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/batch
! ANSYS input file written by Workbench version 2021 R1
! File used for geometry attach: C:\Users\kkhan\AppData\Local\Temp\WB_kkhan_26936_2\wbnew_files\dp0\SYS\DM\SYS.scdoc
/title,wbnew--Static Structural (A5)
/com,--- Data in consistent NMM units. See Solving Units in the help system for more information.
/units,MPA
/prep7
! Turn off shape checking because checks already performed inside WB mesher.
! See help system for more information.
SHPP,OFF,,NOWARN
etcon,set             ! allow ANSYS to choose best KEYOP's for 180x elements, resets any applicable keyopt to MAPDL defaults
/com,*********** Nodes for the whole assembly ***********
nblock,3,,3755
(1i9,3e20.9e3)
        1     2.500000000E+00     1.000000000E+01     0.000000000E+00
        2     2.500000000E+00     0.000000000E+00     0.000000000E+00
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-1
/com,*********** Elements for Body 1 "SYS\Surface" ***********
et,1,183
keyo,1,3,1
eblock,19,solid,,668
(19i9)
        1        1        1        1        0        0        0        0        8        0      401     1658     1667     1604     1604     2879     2745     1604     2744
        1        1        1        1        0        0        0        0        8        0      402     1489     1457     1490     1490     2359     2360     1490     2451
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-1
/com,*********** Elements for Body 2 "SYS\Surface" ***********
et,2,183
keyo,2,3,1
eblock,19,solid,,400
(19i9)
        2        2        2        2        0        0        0        0        8        0        1      153      437      101      451      797      650      651      798
        2        2        2        2        0        0        0        0        8        0        2      451      126      181      153      734      731      795      798
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-1
/com,*********** Send User Defined Coordinate System(s) ***********
csys,0
toffst,273.15,  ! Temperature offset from absolute zero
/com,*********** Set Reference Temperature ***********
tref,22.
/com,*********** Send Materials ***********
Temperature = 'TEMP' ! Temperature
MP,DENS,1,1.556e-08,	! tonne mm^-3
MPTEMP,,,,,,,,
MPTEMP,1,-220.2
MPTEMP,2,106.5
MPTEMP,3,433.2
MPTEMP,4,759.9
MPTEMP,5,1087
MPTEMP,6,1413
MPTEMP,7,1740
MPTEMP,8,2067
MPTEMP,9,2393
MPTEMP,10,2720
MPDATA,EX,1, ,636100,633300,621000,603400,583300,561700,
MPDATA,EX,1, ,539600,517000,493900,470500,	! tonne s^-2 mm^-1
MPTEMP,,,,,,,,
MPTEMP,,,,,,,,
MPTEMP,1,-220.2
MPTEMP,2,106.5
MPTEMP,3,433.2
MPTEMP,4,759.9
MPTEMP,5,1087
MPTEMP,6,1413
MPTEMP,7,1740
MPTEMP,8,2067
MPTEMP,9,2393
MPTEMP,10,2720
MPDATA,NUXY,1, ,0.2098,0.2098,0.2098,0.2098,0.2098,0.2098,
MPDATA,NUXY,1, ,0.2098,0.2098,0.2098,0.2098,
MPTEMP,,,,,,,,
MP,ALPX,1,5.652e-06,	! C^-1
MPTEMP,,,,,,,,
MPTEMP,1,20
MPTEMP,2,529.9
MPTEMP,3,651
MPTEMP,4,772.1
MPTEMP,5,893.2
MPTEMP,6,1014
MPTEMP,7,1135
MPTEMP,8,1257
MPTEMP,9,1378
MPTEMP,10,1499
MPTEMP,11,1620
MPDATA,KXX,1, ,88,68.85,65.88,63.16,60.67,58.41,
MPDATA,KXX,1, ,56.38,54.59,53.04,51.71,50.63,	! tonne mm s^-3 C^-1
MPTEMP,,,,,,,,
MPTEMP,,,,,,,,
MPTEMP,1,19.85
MPTEMP,2,95.71
MPTEMP,3,171.6
MPTEMP,4,247.4
MPTEMP,5,399.2
MPTEMP,6,702.6
MPTEMP,7,1006
MPTEMP,8,1310
MPTEMP,9,1613
MPTEMP,10,1916
MPTEMP,11,2220
MPDATA,C,1, ,178500000,202000000,216000000,225500000,238300000,254600000,
MPDATA,C,1, ,266500000,276500000,285000000,292300000,298600000,	! mm^2 s^-2 C^-1
MPTEMP,,,,,,,,
MP,RSVX,1,0.0007944,	! ohm mm

Temperature = 'TEMP' ! Temperature
MP,DENS,2,7.85e-09,	! tonne mm^-3
MPTEMP,,,,,,,,
MPTEMP,1,-260.2
MPTEMP,2,-182.3
MPTEMP,3,-104.4
MPTEMP,4,-26.47
MPTEMP,5,51.43
MPTEMP,6,129.3
MPTEMP,7,207.2
MPTEMP,8,285.1
MPTEMP,9,363
MPTEMP,10,440.9
MPTEMP,11,518.8
MPTEMP,12,596.7
MPTEMP,13,674.6
MPTEMP,14,752.5
MPTEMP,15,830.4
MPTEMP,16,908.3
MPTEMP,17,986.2
MPTEMP,18,1064
MPTEMP,19,1142
MPTEMP,20,1220
MPDATA,EX,2, ,221800,220300,217400,214100,211400,208100,
MPDATA,EX,2, ,203600,197800,190700,182300,172600,161600,
MPDATA,EX,2, ,149300,135800,127700,122400,117100,111800,
MPDATA,EX,2, ,106600,101300,	! tonne s^-2 mm^-1
MPTEMP,,,,,,,,
MPTEMP,,,,,,,,
MPTEMP,1,-260.2
MPTEMP,2,-182.3
MPTEMP,3,-104.4
MPTEMP,4,-26.47
MPTEMP,5,51.43
MPTEMP,6,129.3
MPTEMP,7,207.2
MPTEMP,8,285.1
MPTEMP,9,363
MPTEMP,10,440.9
MPTEMP,11,518.8
MPTEMP,12,596.7
MPTEMP,13,674.6
MPTEMP,14,752.5
MPTEMP,15,830.4
MPTEMP,16,908.3
MPTEMP,17,986.2
MPTEMP,18,1064
MPTEMP,19,1142
MPTEMP,20,1220
MPDATA,NUXY,2, ,0.29,0.29,0.29,0.29,0.29,0.29,
MPDATA,NUXY,2, ,0.29,0.29,0.29,0.29,0.29,0.29,
MPDATA,NUXY,2, ,0.29,0.29,0.29,0.29,0.29,0.29,
MPDATA,NUXY,2, ,0.29,0.29,
MPTEMP,,,,,,,,

TB,BISO,2,1,
TBTEMP,23
TBDATA,1,350.5,1080
MPTEMP,,,,,,,,
MPTEMP,1,-270.1
MPTEMP,2,-227.9
MPTEMP,3,-185.7
MPTEMP,4,-143.5
MPTEMP,5,-101.3
MPTEMP,6,-59.04
MPTEMP,7,-16.82
MPTEMP,8,25.41
MPTEMP,9,67.63
MPTEMP,10,109.9
MPTEMP,11,152.1
MPTEMP,12,194.3
MPTEMP,13,236.5
MPTEMP,14,278.7
MPTEMP,15,321
MPTEMP,16,363.2
MPTEMP,17,405.4
MPTEMP,18,447.6
MPTEMP,19,489.9
MPTEMP,20,532.1
MPTEMP,21,574.3
MPTEMP,22,616.5
MPTEMP,23,658.7
MPTEMP,24,701
MPTEMP,25,743.2
MPTEMP,26,785.4
MPTEMP,27,827.6
MPTEMP,28,869.9
MPDATA,ALPX,2, ,6.847e-06,8.218e-06,9.196e-06,9.896e-06,1.041e-05,1.081e-05,
MPDATA,ALPX,2, ,1.114e-05,1.145e-05,1.175e-05,1.205e-05,1.236e-05,1.267e-05,
MPDATA,ALPX,2, ,1.298e-05,1.327e-05,1.353e-05,1.376e-05,1.396e-05,1.416e-05,
MPDATA,ALPX,2, ,1.433e-05,1.449e-05,1.462e-05,1.474e-05,1.483e-05,1.486e-05,
MPDATA,ALPX,2, ,1.296e-05,1.095e-05,1.123e-05,1.172e-05,	! C^-1
MPTEMP,,,,,,,,
MPAMOD,2,20,	! C
MPTEMP,,,,,,,,
MPTEMP,1,19.85
MPTEMP,2,85.41
MPTEMP,3,151
MPTEMP,4,216.5
MPTEMP,5,282.1
MPTEMP,6,347.6
MPTEMP,7,413.2
MPTEMP,8,478.7
MPTEMP,9,544.3
MPTEMP,10,609.9
MPTEMP,11,675.4
MPTEMP,12,741
MPTEMP,13,806.5
MPTEMP,14,872.1
MPTEMP,15,937.6
MPTEMP,16,1003
MPTEMP,17,1069
MPTEMP,18,1134
MPTEMP,19,1200
MPDATA,KXX,2, ,52.09,50.89,49.45,47.78,45.89,43.8,
MPDATA,KXX,2, ,41.52,39.06,36.44,33.67,30.76,27.72,
MPDATA,KXX,2, ,25.35,29.16,31.76,33.14,33.31,32.26,
MPDATA,KXX,2, ,30,	! tonne mm s^-3 C^-1
MPTEMP,,,,,,,,
MPTEMP,,,,,,,,
MPTEMP,1,19.85
MPTEMP,2,92.07
MPTEMP,3,164.3
MPTEMP,4,236.5
MPTEMP,5,308.7
MPTEMP,6,381
MPTEMP,7,453.2
MPTEMP,8,525.4
MPTEMP,9,597.6
MPTEMP,10,669.9
MPDATA,C,2, ,479800000,490800000,508500000,532300000,561500000,595600000,
MPDATA,C,2, ,633900000,675800000,720600000,767800000,	! mm^2 s^-2 C^-1
MPTEMP,,,,,,,,
MPTEMP,,,,,,,,
MPTEMP,1,19.85
MPTEMP,2,81.96
MPTEMP,3,144.1
MPTEMP,4,206.2
MPTEMP,5,268.3
MPTEMP,6,330.4
MPTEMP,7,392.5
MPTEMP,8,454.6
MPTEMP,9,516.7
MPTEMP,10,578.8
MPTEMP,11,640.9
MPTEMP,12,703
MPTEMP,13,765.1
MPTEMP,14,827.2
MPTEMP,15,889.3
MPTEMP,16,951.4
MPTEMP,17,1014
MPTEMP,18,1076
MPTEMP,19,1138
MPTEMP,20,1200
MPDATA,RSVX,2, ,0.0001713,0.0002084,0.0002513,0.0003003,0.0003556,0.0004174,
MPDATA,RSVX,2, ,0.0004857,0.0005609,0.0006431,0.0007326,0.0008292,0.0009337,
MPDATA,RSVX,2, ,0.001046,0.001123,0.001145,0.001166,0.001185,0.001202,
MPDATA,RSVX,2, ,0.001217,0.001231,	! ohm mm
MPTEMP,,,,,,,,

/com,*********** Send Sheet Properties ***********
!************************* Model Summary ********************
!SYS\Surface,	Tungsten carbide,	matid,	1
!SYS\Surface,	Carbon steel, 1040, annealed,	matid,	2
!************************* End Model Summary ********************
/com,*********** Create Contact "Frictional - SYS\Surface To SYS\Surface" ***********
*set,tid,4
*set,cid,3
r,tid
r,cid
et,tid,169
et,cid,172
eblock,10,,,50
(15i9)
     1069        4        4        4        0       44       43      535
     1070        4        4        4        0       45       44      537
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-1
eblock,10,,,50
(15i9)
     1119        3        3        3        0       44       43      535
     1120        3        3        3        0       45       44      537
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-1
eblock,10,,,42
(15i9)
     1169        3        4        3        0     1344     1316     2053
     1170        3        4        3        0     1343     1344     2107
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-1
eblock,10,,,42
(15i9)
     1211        4        3        4        0     1344     1316     2053
     1212        4        3        4        0     1343     1344     2107
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-1
keyo,cid,8,2               ! auto create asymmetric contact (from Program Controlled setting)
keyo,cid,10,0              ! adjust contact stiffness each NR iteration (from Program Controlled setting)
keyo,cid,12,0              ! standard contact
mp,mu,cid,5.e-002   ! unitless
keyo,cid,2,0               ! augmented Lagrange (from Program Controlled setting)
keyo,cid,4,0               ! on Gauss point (from Program Controlled setting)
keyo,cid,9,0               ! use real geometry with stepped effects
keyo,cid,7,0               ! No Prediction
rmod,tid,3,1.       ! FKN
rmod,tid,5,0.       ! ICONT
rmod,tid,6,1.       ! PINB
rmod,tid,10,0.      ! CNOF
rmod,tid,12,0.      ! FKT
rmod,tid,36,35      ! WB DSID
rmod,cid,3,1.       ! FKN
rmod,cid,5,0.       ! ICONT
rmod,cid,6,1.       ! PINB
rmod,cid,10,0.      ! CNOF
rmod,cid,12,0.      ! FKT
rmod,cid,36,35      ! WB DSID
nsel,all
esel,all
/com,*********** Fixed Supports ***********
CMBLOCK,_FIXEDSU,NODE,       81
(8i10)
      1345      1357      1358      1359      1360      1361      1362      1363
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cmsel,s,_FIXEDSU
d,all,all
nsel,all
tblist
fini
/com,****************************************************************************
/com,*************************    SOLUTION       ********************************
/com,****************************************************************************
/solu
antype,0                   ! static analysis
nlgeom,on                  ! Turn on Large Deformation Effects
_thickRatio=  0     ! Ratio of thick parts in the model
eqsl,sparse,,,,,1
cntr,print,1               ! print out contact info and also make no initial contact an error
nldiag,cont,iter           ! print out contact info each equilibrium iteration
rescontrol,define,last,last,,dele	   ! Program Controlled
/com,****************************************************
/com,******************* SOLVE FOR LS 1 OF 1 ****************
/com,*** Set Displacements ***
CMBLOCK,_CM40UY_YP,NODE,       21
(8i10)
         1        42        43        44        45        46        47        48
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cmsel,s,_CM40UY_YP
d,all,uy,10.
nsel,all

/com,*** Component For All Non-Zero UY Displacements ***
cmsel,s,_CM40uy_yp
cm,_DISPNONZEROUY,NODE
nsel,all

autots,on                   ! User turned on automatic time stepping
nsub,100,10000,100,OFF
time,1.
outres,erase
outres,all,none
outres,nsol,all,
outres,rsol,all
outres,eangl,all
outres,etmp,all
outres,veng,all
outres,strs,all,
outres,epel,all,
outres,eppl,all,
outres,cont,all,
! *********** WB SOLVE COMMAND ***********
! check interactive state
*get,ANSINTER_,active,,int
*if,ANSINTER_,ne,0,then
/eof
*endif
solve
/com *************** Write FE CONNECTORS *********
CEWRITE,file,ce,,INTE
/com,****************************************************
/com,*************** FINISHED SOLVE FOR LS 1 *************
/post1
fini
